// SBML level 3 version 1

model Flat_Model()
  // model units - time: second, extent: item

  // Compartments:
  compartment Flat_Model_compartment = 1 fL;

  // Species:
  substanceOnly species site_cell_Plac_molecule in Flat_Model_compartment = 1;  // substance in MOLECULE
  substanceOnly species site_cell_Plambda_molecule in Flat_Model_compartment = 1;  // substance in MOLECULE
  substanceOnly species site_cell_Ptet_molecule in Flat_Model_compartment = 1;  // substance in MOLECULE
  substanceOnly species site_cell_cI_molecule in Flat_Model_compartment = 1;  // substance in MOLECULE
  substanceOnly species site_cell_lacI_molecule in Flat_Model_compartment = 1;  // substance in MOLECULE
  substanceOnly species site_cell_tetR_molecule in Flat_Model_compartment = 1;  // substance in MOLECULE
  substanceOnly species site_cell_gfp_molecule in Flat_Model_compartment = 1;  // substance in MOLECULE
  substanceOnly species site_cell_LacI_molecule in Flat_Model_compartment = 0;  // substance in MOLECULE
  substanceOnly species site_cell_CI_molecule in Flat_Model_compartment = 0;  // substance in MOLECULE
  substanceOnly species site_cell_TetR_molecule in Flat_Model_compartment = 0;  // substance in MOLECULE
  substanceOnly species site_cell_GFP_molecule in Flat_Model_compartment = 0;  // substance in MOLECULE
  substanceOnly species site_cell_LacI_site_cell_LacI_molecule in Flat_Model_compartment = 0;  // substance in MOLECULE
  substanceOnly species site_cell_CI_site_cell_CI_molecule in Flat_Model_compartment = 0;  // substance in MOLECULE
  substanceOnly species site_cell_TetR_site_cell_TetR_molecule in Flat_Model_compartment = 0;  // substance in MOLECULE
  substanceOnly species site_cell_operon1_rna_molecule in Flat_Model_compartment = 0;  // substance in MOLECULE
  substanceOnly species site_cell_Plac_site_cell_LacI_site_cell_LacI_molecule in Flat_Model_compartment = 0;  // substance in MOLECULE
  substanceOnly species site_cell_operon_2_rna_molecule in Flat_Model_compartment = 0;  // substance in MOLECULE
  substanceOnly species site_cell_Plambda_site_cell_CI_site_cell_CI_molecule in Flat_Model_compartment = 0;  // substance in MOLECULE
  substanceOnly species site_cell_operon_3_rna_molecule in Flat_Model_compartment = 0;  // substance in MOLECULE
  substanceOnly species site_cell_Ptet_site_cell_TetR_site_cell_TetR_molecule in Flat_Model_compartment = 0;  // substance in MOLECULE

  // Reactions:
  repression: site_cell_Plac_molecule + site_cell_LacI_site_cell_LacI_molecule -> site_cell_Plac_site_cell_LacI_site_cell_LacI_molecule; repression_forward_rate*site_cell_Plac_molecule*site_cell_LacI_site_cell_LacI_molecule - repression_reverse_rate*site_cell_Plac_site_cell_LacI_site_cell_LacI_molecule;
    repression_forward_rate = 2.767565e-11 repression_forward; repression_reverse_rate = 0.1666667 repression_reverse;
  transcription: site_cell_Plac_molecule => site_cell_Plac_molecule + site_cell_operon1_rna_molecule; transcription_forward_rate*site_cell_Plac_molecule;
    transcription_forward_rate = 0.01666667 transcription_forward;
  translation: site_cell_operon1_rna_molecule => site_cell_operon1_rna_molecule + site_cell_TetR_molecule; translation_forward_rate*site_cell_operon1_rna_molecule;
    translation_forward_rate = 1.666667 translation_forward;
  rna_degradation: site_cell_operon1_rna_molecule => ; rna_degradation_forward_rate*site_cell_operon1_rna_molecule;
    rna_degradation_forward_rate = 0.001666667 rna_degradation_forward;
  repression1: site_cell_Plambda_molecule + site_cell_CI_site_cell_CI_molecule -> site_cell_Plambda_site_cell_CI_site_cell_CI_molecule; repression1_forward_rate*site_cell_Plambda_molecule*site_cell_CI_site_cell_CI_molecule - repression1_reverse_rate*site_cell_Plambda_site_cell_CI_site_cell_CI_molecule;
    repression1_forward_rate = 2.767565e-11 repression1_forward; repression1_reverse_rate = 0.1666667 repression1_reverse;
  transcription1: site_cell_Plambda_molecule => site_cell_Plambda_molecule + site_cell_operon_2_rna_molecule; transcription1_forward_rate*site_cell_Plambda_molecule;
    transcription1_forward_rate = 0.01666667 transcription1_forward;
  translation1: site_cell_operon_2_rna_molecule => site_cell_operon_2_rna_molecule + site_cell_LacI_molecule; translation1_forward_rate*site_cell_operon_2_rna_molecule;
    translation1_forward_rate = 1.666667 translation1_forward;
  rna_degradation1: site_cell_operon_2_rna_molecule => ; rna_degradation1_forward_rate*site_cell_operon_2_rna_molecule;
    rna_degradation1_forward_rate = 0.001666667 rna_degradation1_forward;
  repression2: site_cell_Ptet_molecule + site_cell_TetR_site_cell_TetR_molecule -> site_cell_Ptet_site_cell_TetR_site_cell_TetR_molecule; repression2_forward_rate*site_cell_TetR_site_cell_TetR_molecule*site_cell_Ptet_molecule - repression2_reverse_rate*site_cell_Ptet_site_cell_TetR_site_cell_TetR_molecule;
    repression2_forward_rate = 2.767565e-11 repression2_forward; repression2_reverse_rate = 0.1666667 repression2_reverse;
  transcription2: site_cell_Ptet_molecule => site_cell_Ptet_molecule + site_cell_operon_3_rna_molecule; transcription2_forward_rate*site_cell_Ptet_molecule;
    transcription2_forward_rate = 0.01666667 transcription2_forward;
  translation2: site_cell_operon_3_rna_molecule => site_cell_operon_3_rna_molecule + site_cell_CI_molecule; translation2_forward_rate*site_cell_operon_3_rna_molecule;
    translation2_forward_rate = 1.666667 translation2_forward;
  rna_degradation2: site_cell_operon_3_rna_molecule => ; rna_degradation2_forward_rate*site_cell_operon_3_rna_molecule;
    rna_degradation2_forward_rate = 0.001666667 rna_degradation2_forward;
  lac_dimerization: site_cell_LacI_molecule + site_cell_LacI_molecule -> site_cell_LacI_site_cell_LacI_molecule; lac_dimerization_forward_rate*site_cell_LacI_molecule^2 - lac_dimerization_reverse_rate*site_cell_LacI_site_cell_LacI_molecule;
    lac_dimerization_forward_rate = 2.767565e-11 lac_dimerization_forward; lac_dimerization_reverse_rate = 2.083333 lac_dimerization_reverse;
  cI_dimerization: site_cell_CI_molecule + site_cell_CI_molecule -> site_cell_CI_site_cell_CI_molecule; cI_dimerization_forward_rate*site_cell_CI_molecule^2 - cI_dimerization_reverse_rate*site_cell_CI_site_cell_CI_molecule;
    cI_dimerization_forward_rate = 2.767565e-11 cI_dimerization_forward; cI_dimerization_reverse_rate = 2.083333 cI_dimerization_reverse;
  tetR_dimerization: site_cell_TetR_molecule + site_cell_TetR_molecule -> site_cell_TetR_site_cell_TetR_molecule; tetR_dimerization_forward_rate*site_cell_TetR_molecule^2 - tetR_dimerization_reverse_rate*site_cell_TetR_site_cell_TetR_molecule;
    tetR_dimerization_forward_rate = 2.767565e-11 tetR_dimerization_forward; tetR_dimerization_reverse_rate = 2.083333 tetR_dimerization_reverse;
  cI_degradation: site_cell_CI_molecule => ; cI_degradation_forward_rate*site_cell_CI_molecule;
    cI_degradation_forward_rate = 0.022 cI_degradation_forward;
  lac_degradation: site_cell_LacI_molecule => ; lac_degradation_forward_rate*site_cell_LacI_molecule;
    lac_degradation_forward_rate = 0.022 lac_degradation_forward;
  tetR_degradation: site_cell_TetR_molecule => ; tetR_degradation_forward_rate*site_cell_TetR_molecule;
    tetR_degradation_forward_rate = 0.022 tetR_degradation_forward;
  gfp_degradation: site_cell_GFP_molecule => ; gfp_degradation_forward_rate*site_cell_GFP_molecule;
    gfp_degradation_forward_rate = 0.0022 gfp_degradation_forward;

  // Unit definitions:
  unit MOLECULE = item;
  unit fL = 1e-15 litre;
  unit repression_forward = 1 / (second * item);
  unit repression_reverse = 1 / second;
  unit transcription_forward = 1 / second;
  unit translation_forward = 1 / second;
  unit rna_degradation_forward = 1 / second;
  unit repression1_forward = 1 / (second * item);
  unit repression1_reverse = 1 / second;
  unit transcription1_forward = 1 / second;
  unit translation1_forward = 1 / second;
  unit rna_degradation1_forward = 1 / second;
  unit repression2_forward = 1 / (second * item);
  unit repression2_reverse = 1 / second;
  unit transcription2_forward = 1 / second;
  unit translation2_forward = 1 / second;
  unit rna_degradation2_forward = 1 / second;
  unit lac_dimerization_forward = 1 / (second * item);
  unit lac_dimerization_reverse = 1 / second;
  unit cI_dimerization_forward = 1 / (second * item);
  unit cI_dimerization_reverse = 1 / second;
  unit tetR_dimerization_forward = 1 / (second * item);
  unit tetR_dimerization_reverse = 1 / second;
  unit cI_degradation_forward = 1 / second;
  unit lac_degradation_forward = 1 / second;
  unit tetR_degradation_forward = 1 / second;
  unit gfp_degradation_forward = 1 / second;
end
