// SBML level 3 version 1

model site()
  // model units - time: second, extent: item

  // Sub-modules:
  cell_submodel: cell();

  // Unit definitions:
  unit MOLECULE = item;
  unit fL = 1e-15 litre;
end

model cell()
  // model units - time: second, extent: item

  // Sub-modules:
  operon1_submodel: operon1();
  operon_2_submodel: operon_2();
  operon_3_submodel: operon_3();

  // Compartments:
  compartment cell_compartment = 1 fL; operon1_submodel.operon1_compartment is cell_compartment; operon_2_submodel.operon_2_compartment is cell_compartment; operon_3_submodel.operon_3_compartment is cell_compartment;

  // Species:
  substanceOnly species Plac_molecule in cell_compartment = 1; operon1_submodel.Plac_molecule is Plac_molecule;  // substance in MOLECULE
  substanceOnly species Plambda_molecule in cell_compartment = 1; operon_2_submodel.Plambda_molecule is Plambda_molecule;  // substance in MOLECULE
  substanceOnly species Ptet_molecule in cell_compartment = 1; operon_3_submodel.Ptet_molecule is Ptet_molecule;  // substance in MOLECULE
  substanceOnly species cI_molecule in cell_compartment = 1; operon_3_submodel.cI_molecule is cI_molecule;  // substance in MOLECULE
  substanceOnly species lacI_molecule in cell_compartment = 1; operon_2_submodel.lacI_molecule is lacI_molecule;  // substance in MOLECULE
  substanceOnly species tetR_molecule in cell_compartment = 1; operon1_submodel.tetR_molecule is tetR_molecule;  // substance in MOLECULE
  substanceOnly species gfp_molecule in cell_compartment = 1;  // substance in MOLECULE
  substanceOnly species LacI_molecule in cell_compartment = 0; operon_2_submodel.LacI_molecule is LacI_molecule;  // substance in MOLECULE
  substanceOnly species CI_molecule in cell_compartment = 0; operon_3_submodel.CI_molecule is CI_molecule;  // substance in MOLECULE
  substanceOnly species TetR_molecule in cell_compartment = 0; operon1_submodel.TetR_molecule is TetR_molecule;  // substance in MOLECULE
  substanceOnly species GFP_molecule in cell_compartment = 0;  // substance in MOLECULE
  substanceOnly species LacI_LacI_molecule in cell_compartment = 0; operon1_submodel.LacI_LacI_molecule is LacI_LacI_molecule;  // substance in MOLECULE
  substanceOnly species CI_CI_molecule in cell_compartment = 0; operon_2_submodel.CI_CI_molecule is CI_CI_molecule;  // substance in MOLECULE
  substanceOnly species TetR_TetR_molecule in cell_compartment = 0; operon_3_submodel.TetR_TetR_molecule is TetR_TetR_molecule;  // substance in MOLECULE

  // Reactions:
  lac_dimerization: LacI_molecule + LacI_molecule -> LacI_LacI_molecule; lac_dimerization_forward_rate*LacI_molecule^2 - lac_dimerization_reverse_rate*LacI_LacI_molecule;
    lac_dimerization_forward_rate = 0.01666667 lac_dimerization_forward; lac_dimerization_reverse_rate = 2.083333 lac_dimerization_reverse;
  cI_dimerization: CI_molecule + CI_molecule -> CI_CI_molecule; cI_dimerization_forward_rate*CI_molecule^2 - cI_dimerization_reverse_rate*CI_CI_molecule;
    cI_dimerization_forward_rate = 0.01666667 cI_dimerization_forward; cI_dimerization_reverse_rate = 2.083333 cI_dimerization_reverse;
  tetR_dimerization: TetR_molecule + TetR_molecule -> TetR_TetR_molecule; tetR_dimerization_forward_rate*TetR_molecule^2 - tetR_dimerization_reverse_rate*TetR_TetR_molecule;
    tetR_dimerization_forward_rate = 0.01666667 tetR_dimerization_forward; tetR_dimerization_reverse_rate = 2.083333 tetR_dimerization_reverse;
  cI_degradation: CI_molecule => ; cI_degradation_forward_rate*CI_molecule;
    cI_degradation_forward_rate = 0.022 cI_degradation_forward;
  lac_degradation: LacI_molecule => ; lac_degradation_forward_rate*LacI_molecule;
    lac_degradation_forward_rate = 0.022 lac_degradation_forward;
  tetR_degradation: TetR_molecule => ; tetR_degradation_forward_rate*TetR_molecule;
    tetR_degradation_forward_rate = 0.022 tetR_degradation_forward;
  gfp_degradation: GFP_molecule => ; gfp_degradation_forward_rate*GFP_molecule;
    gfp_degradation_forward_rate = 0.0022 gfp_degradation_forward;

  // Unit definitions:
  unit MOLECULE = item;
  unit fL = 1e-15 litre;
  unit lac_dimerization_forward = 1 / (second * item);
  unit lac_dimerization_reverse = 1 / second;
  unit cI_dimerization_forward = 1 / (second * item);
  unit cI_dimerization_reverse = 1 / second;
  unit tetR_dimerization_forward = 1 / (second * item);
  unit tetR_dimerization_reverse = 1 / second;
  unit cI_degradation_forward = 1 / second;
  unit lac_degradation_forward = 1 / second;
  unit tetR_degradation_forward = 1 / second;
  unit gfp_degradation_forward = 1 / second;
end

model operon1(operon1_compartment, Plac_molecule, tetR_molecule, LacI_LacI_molecule, TetR_molecule)
  // model units - time: second, extent: item

  // Compartments:
  compartment operon1_compartment = 1 fL;

  // Species:
  substanceOnly species rna_molecule in operon1_compartment = 0;  // substance in MOLECULE
  substanceOnly species LacI_LacI_molecule in operon1_compartment = 0;  // substance in MOLECULE
  substanceOnly species Plac_LacI_LacI_molecule in operon1_compartment = 0;  // substance in MOLECULE
  substanceOnly species Plac_molecule in operon1_compartment = 0;  // substance in MOLECULE
  substanceOnly species tetR_molecule in operon1_compartment = 0;  // substance in MOLECULE
  substanceOnly species TetR_molecule in operon1_compartment = 0;  // substance in MOLECULE

  // Reactions:
  repression: Plac_molecule + LacI_LacI_molecule -> Plac_LacI_LacI_molecule; repression_forward_rate*Plac_molecule*LacI_LacI_molecule - reverse_rate*Plac_LacI_LacI_molecule;
    repression_forward_rate = 0.01666667 repression_forward; reverse_rate = 0.1666667 repression_reverse;
  transcription: Plac_molecule => Plac_molecule + rna_molecule; transcription_forward_rate*Plac_molecule;
    transcription_forward_rate = 0.01666667 transcription_forward;
  translation: rna_molecule => rna_molecule + TetR_molecule; translation_forward_rate*rna_molecule;
    translation_forward_rate = 1.666667 translation_forward;
  rna_degradation: rna_molecule => ; rna_degradation_forward_rate*rna_molecule;
    rna_degradation_forward_rate = 0.001666667 rna_degradation_forward;

  // Unit definitions:
  unit MOLECULE = item;
  unit fL = 1e-15 litre;
  unit repression_forward = 1 / (second * item);
  unit repression_reverse = 1 / second;
  unit transcription_forward = 1 / second;
  unit translation_forward = 1 / second;
  unit rna_degradation_forward = 1 / second;
end

model operon_2(operon_2_compartment, Plambda_molecule, lacI_molecule, CI_CI_molecule, LacI_molecule)
  // model units - time: second, extent: item

  // Compartments:
  compartment operon_2_compartment = 1 fL;

  // Species:
  substanceOnly species rna_molecule in operon_2_compartment = 0;  // substance in MOLECULE
  substanceOnly species CI_CI_molecule in operon_2_compartment = 0;  // substance in MOLECULE
  substanceOnly species Plambda_CI_CI_molecule in operon_2_compartment = 0;  // substance in MOLECULE
  substanceOnly species Plambda_molecule in operon_2_compartment = 0;  // substance in MOLECULE
  substanceOnly species lacI_molecule in operon_2_compartment = 0;  // substance in MOLECULE
  substanceOnly species LacI_molecule in operon_2_compartment = 0;  // substance in MOLECULE

  // Reactions:
  repression: Plambda_molecule + CI_CI_molecule -> Plambda_CI_CI_molecule; repression_forward_rate*CI_CI_molecule*Plambda_molecule - reverse_rate*Plambda_CI_CI_molecule;
    repression_forward_rate = 0.01666667 repression_forward; reverse_rate = 0.1666667 repression_reverse;
  transcription: Plambda_molecule => Plambda_molecule + rna_molecule; transcription_forward_rate*Plambda_molecule;
    transcription_forward_rate = 0.01666667 transcription_forward;
  translation: rna_molecule => rna_molecule + LacI_molecule; translation_forward_rate*rna_molecule;
    translation_forward_rate = 1.666667 translation_forward;
  rna_degradation: rna_molecule => ; rna_degradation_forward_rate*rna_molecule;
    rna_degradation_forward_rate = 0.001666667 rna_degradation_forward;

  // Unit definitions:
  unit MOLECULE = item;
  unit fL = 1e-15 litre;
  unit repression_forward = 1 / (second * item);
  unit repression_reverse = 1 / second;
  unit transcription_forward = 1 / second;
  unit translation_forward = 1 / second;
  unit rna_degradation_forward = 1 / second;
end

model operon_3(operon_3_compartment, Ptet_molecule, cI_molecule, TetR_TetR_molecule, CI_molecule)
  // model units - time: second, extent: item

  // Compartments:
  compartment operon_3_compartment = 1 fL;

  // Species:
  substanceOnly species rna_molecule in operon_3_compartment = 0;  // substance in MOLECULE
  substanceOnly species TetR_TetR_molecule in operon_3_compartment = 0;  // substance in MOLECULE
  substanceOnly species Ptet_TetR_TetR_molecule in operon_3_compartment = 0;  // substance in MOLECULE
  substanceOnly species Ptet_molecule in operon_3_compartment = 0;  // substance in MOLECULE
  substanceOnly species cI_molecule in operon_3_compartment = 0;  // substance in MOLECULE
  substanceOnly species CI_molecule in operon_3_compartment = 0;  // substance in MOLECULE

  // Reactions:
  repression: Ptet_molecule + TetR_TetR_molecule -> Ptet_TetR_TetR_molecule; repression_forward_rate*Ptet_molecule*TetR_TetR_molecule - reverse_rate*Ptet_TetR_TetR_molecule;
    repression_forward_rate = 0.01666667 repression_forward; reverse_rate = 0.1666667 repression_reverse;
  transcription: Ptet_molecule => Ptet_molecule + rna_molecule; transcription_forward_rate*Ptet_molecule;
    transcription_forward_rate = 0.01666667 transcription_forward;
  translation: rna_molecule => rna_molecule + CI_molecule; translation_forward_rate*rna_molecule;
    translation_forward_rate = 1.666667 translation_forward;
  rna_degradation: rna_molecule => ; rna_degradation_forward_rate*rna_molecule;
    rna_degradation_forward_rate = 0.001666667 rna_degradation_forward;

  // Unit definitions:
  unit MOLECULE = item;
  unit fL = 1e-15 litre;
  unit repression_forward = 1 / (second * item);
  unit repression_reverse = 1 / second;
  unit transcription_forward = 1 / second;
  unit translation_forward = 1 / second;
  unit rna_degradation_forward = 1 / second;
end

model The_EMF_Model()
  // model units - time: second, extent: item

  // Sub-modules:
  site_submodel: site();

  // Unit definitions:
  unit MOLECULE = item;
  unit fL = 1e-15 litre;
end
